# OpenSim document version 40000
InverseKinematicsTool generic:
  constraint_weight: Inf
  accuracy: 1e-5
  time_range: -Inf Inf
  report_errors: true
  report_marker_locations: true
  IKTaskSet:
    IKMarkerTask C7: apply=true weight=5
    IKMarkerTask L2: apply=true weight=5
    IKMarkerTask T6: apply=true weight=5
    IKMarkerTask T11: apply=true weight=5
    IKMarkerTask rshoulder: apply=true weight=5
    IKMarkerTask lshoulder: apply=true weight=5
    IKMarkerTask sternum: apply=true weight=10
    IKMarkerTask r_ASIS: apply=true weight=25
    IKMarkerTask l_ASIS: apply=true weight=25
    IKMarkerTask r_PSIS: apply=true weight=25
    IKMarkerTask l_PSIS: apply=true weight=25
    IKMarkerTask r_knee: apply=true weight=10
    IKMarkerTask r_mknee: apply=true weight=10
    IKMarkerTask r_ankle: apply=true weight=10
    IKMarkerTask r_mankle: apply=true weight=10
    IKMarkerTask r_toe: apply=true weight=7
    IKMarkerTask r_5meta: apply=true weight=7
    IKMarkerTask r_calc: apply=true weight=7
    IKMarkerTask l_knee: apply=true weight=10
    IKMarkerTask l_mknee: apply=true weight=10
    IKMarkerTask l_ankle: apply=true weight=10
    IKMarkerTask l_mankle: apply=true weight=10
    IKMarkerTask l_toe: apply=true weight=7
    IKMarkerTask l_calc: apply=true weight=7
    IKMarkerTask l_5meta: apply=true weight=7
    IKMarkerTask r_melbow: apply=true weight=5
    IKMarkerTask r_lelbow: apply=true weight=5
    IKMarkerTask r_mwrist: apply=true weight=5
    IKMarkerTask r_lwrist: apply=true weight=5
    IKMarkerTask l_melbow: apply=true weight=5
    IKMarkerTask l_lelbow: apply=true weight=5
    IKMarkerTask l_mwrist: apply=true weight=5
    IKMarkerTask l_lwrist: apply=true weight=5
