# OpenSim document version 40000
MarkerSet:
  Marker C7: torso (-0.08 0.42 0.003)
  Marker rshoulder: torso (0 0.418 0.142)
  Marker lshoulder: torso (0 0.418 -0.142)
  Marker sternum: torso (0.046 0.385 0)
  Marker r_ASIS: pelvis (0.028 0.01 0.128)
  Marker l_ASIS: pelvis (0.028 0.01 -0.128)
  Marker r_PSIS: pelvis (-0.154 0.025 0.05)
  Marker l_PSIS: pelvis (-0.154 0.025 -0.05)
  Marker right_knee: tibia_r (-0.00808954 -0.0035348 -0.00148474)
  Marker r_ankle: tibia_r (-0.01743173 -0.3850714 0.04727037)
  Marker r_mankle: tibia_r (0.006 -0.38 -0.038)
  Marker r_big_toe: calcn_r (0.1804591 0.01762133 0.001004512)
  Marker r_5meta: calcn_r (0.1358638 0.001114828 0.06143212)
  Marker r_calc: calcn_r (-0.0321615 0.01491079 -0.0111695)
  Marker left_knee: tibia_l (-0.00808954 -0.0035348 0.00148474)
  Marker l_ankle: tibia_l (-0.017 -0.385 -0.047)
  Marker l_mankle: tibia_l (0.006 -0.38 0.038)
  Marker l_big_toe: calcn_l (0.1804591 0.01762133 -0.001004512)
  Marker l_calc: calcn_l (-0.03 0.01459576 0.01)
  Marker l_5meta: calcn_l (0.1358638 0.001114828 -0.06143212)
  Marker right_elbow: humerus_r (0.013144 -0.286273 -0.009595)
  Marker r_lwrist: radius_r (-0.02965623 -0.2244783 0.03462701)
  Marker r_mwrist: radius_r (-0.02980336 -0.2253365 -0.01089353)
  Marker left_elbow: humerus_l (0.013144 -0.286273 0.009595)
  Marker l_lwrist: radius_l (-0.0354783 -0.2265841 -0.03585613)
  Marker l_mwrist: radius_l (-0.04018316 -0.2267243 0.005623399)
