# OpenSim document version 40000
MarkerSet:
  Marker sternum: torso (0.046 0.385 0)
  Marker r_ASIS: pelvis (0.028 0.01 0.128)
  Marker l_ASIS: pelvis (0.028 0.01 -0.128)
  Marker r_PSIS: pelvis (-0.154 0.025 0.05)
  Marker l_PSIS: pelvis (-0.154 0.025 -0.05)
  Marker r_knee: femur_r (0.008 -0.378 0.055)
  Marker r_mknee: femur_r (0.011 -0.378 -0.055)
  Marker r_ankle: tibia_r (-0.006699045 -0.3791442 0.05017824)
  Marker r_mankle: tibia_r (-0.005474858 -0.38 -0.0385759)
  Marker r_toe: calcn_r (0.186844 0.00836653 0.00526621)
  Marker r_5meta: calcn_r (0.14 0.005 0.065)
  Marker r_calc: calcn_r (-0.0321615 0.0325693 -0.0111695)
  Marker l_knee: femur_l (0.008 -0.378 -0.055)
  Marker l_mknee: femur_l (0.011 -0.378 0.055)
  Marker l_ankle: tibia_l (-0.00669904 -0.379144 -0.0501782)
  Marker l_mankle: tibia_l (-0.00547486 -0.38 0.0385759)
  Marker l_toe: calcn_l (0.186844 0.00836653 -0.00526621)
  Marker l_calc: calcn_l (-0.0321615 0.0325693 0.0111695)
  Marker l_5meta: calcn_l (0.14 0.005 -0.065)
  Marker rshoulder: torso (0 0.418 0.142)
  Marker lshoulder: torso (0 0.418 -0.142)
  Marker C7: torso (-0.08 0.42 0)
  Marker r_lelbow: humerus_r (0.015 -0.28 0.04) fixed=true
  Marker r_melbow: humerus_r (0.00225 -0.286 -0.05) fixed=true
  Marker r_lwrist: radius_r (0.0005 -0.225 0.05) fixed=true
  Marker r_mwrist: radius_r (-0.022 -0.225 -0.022) fixed=true
  Marker l_lelbow: humerus_l (0.015 -0.28 -0.04) fixed=true
  Marker l_melbow: humerus_l (0.00225 -0.286 0.05) fixed=true
  Marker l_lwrist: radius_l (0.0005 -0.225 -0.05) fixed=true
  Marker l_mwrist: radius_l (-0.022 -0.225 0.022) fixed=true
  Marker L2: torso (-0.0353185 0.0362803 0)
  Marker T11: torso (-0.0771878 0.1486894 0)
  Marker T6: torso (-0.098202 0.281149 0)
