# OpenSim document version 40000
ScaleTool RajagopalModified2016_withArms:
  mass: 75.337 [kg]
  height: 1.89
  age: -1
  ModelScaler:
    apply: true
    scaling_order: measurements
    time_range: 3.41 3.66
    preserve_mass_distribution: true
    MeasurementSet:
      Measurement foot: apply=true
        MarkerPair: markers=(r_calc r_toe)
        MarkerPair: markers=(r_calc r_5meta)
        MarkerPair: markers=(l_calc l_toe)
        MarkerPair: markers=(l_calc l_5meta)
        BodyScale talus_r: axes=(X Y Z)
        BodyScale calcn_r: axes=(X Y Z)
        BodyScale toes_r: axes=(X Y Z)
        BodyScale talus_l: axes=(X Y Z)
        BodyScale calcn_l: axes=(X Y Z)
        BodyScale toes_l: axes=(X Y Z)
      Measurement tibia_r: apply=true
        MarkerPair: markers=(r_knee r_ankle)
        MarkerPair: markers=(r_mknee r_mankle)
        BodyScale tibia_r: axes=(X Y Z)
      Measurement femur_r: apply=true
        MarkerPair: markers=(r_ASIS r_knee)
        BodyScale femur_r: axes=(X Y Z)
        BodyScale patella_r: axes=(X Y Z)
      Measurement tibia_l: apply=true
        MarkerPair: markers=(l_knee l_ankle)
        MarkerPair: markers=(l_mknee l_mankle)
        BodyScale tibia_l: axes=(X Y Z)
      Measurement femur_l: apply=true
        MarkerPair: markers=(l_ASIS l_knee)
        BodyScale femur_l: axes=(X Y Z)
        BodyScale patella_l: axes=(X Y Z)
      Measurement pelvisXY: apply=true
        MarkerPair: markers=(r_ASIS r_PSIS)
        MarkerPair: markers=(l_ASIS l_PSIS)
        BodyScale pelvis: axes=(X Y)
      Measurement pelvisZ: apply=true
        MarkerPair: markers=(l_ASIS r_ASIS)
        BodyScale pelvis: axes=Z
      Measurement torsoXY: apply=true
        MarkerPair: markers=(rshoulder r_PSIS)
        MarkerPair: markers=(lshoulder l_PSIS)
        MarkerPair: markers=(C7 r_PSIS)
        MarkerPair: markers=(C7 l_PSIS)
        BodyScale torso: axes=(X Y)
        BodyScale scapulaPhantom_r: axes=(X Y)
        BodyScale scapulaPhantom_l: axes=(X Y)
      Measurement torsoZ: apply=true
        MarkerPair: markers=(rshoulder lshoulder)
        BodyScale torso: axes=Z
        BodyScale scapulaPhantom_r: axes=Z
        BodyScale scapulaPhantom_l: axes=Z
      Measurement humerus: apply=true
        MarkerPair: markers=(rshoulder r_lelbow)
        MarkerPair: markers=(rshoulder r_melbow)
        MarkerPair: markers=(lshoulder l_lelbow)
        MarkerPair: markers=(lshoulder l_melbow)
        BodyScale humerus_r: axes=(X Y Z)
        BodyScale humerus_l: axes=(X Y Z)
      Measurement radius: apply=true
        MarkerPair: markers=(r_mwrist r_lelbow)
        MarkerPair: markers=(r_lwrist r_melbow)
        MarkerPair: markers=(l_mwrist l_lelbow)
        MarkerPair: markers=(l_lwrist l_melbow)
        BodyScale ulna_r: axes=(X Y Z)
        BodyScale radius_r: axes=(X Y Z)
        BodyScale hand_r: axes=(X Y Z)
        BodyScale ulna_l: axes=(X Y Z)
        BodyScale radius_l: axes=(X Y Z)
        BodyScale hand_l: axes=(X Y Z)
  MarkerPlacer:
    apply: true
    time_range: 3.41 3.66
    max_marker_movement: -1
    IKTaskSet:
      IKMarkerTask C7: apply=true weight=20
      IKMarkerTask rshoulder: apply=true weight=5
      IKMarkerTask lshoulder: apply=true weight=5
      IKMarkerTask sternum: apply=true weight=10
      IKMarkerTask r_ASIS: apply=true weight=10
      IKMarkerTask l_ASIS: apply=true weight=10
      IKMarkerTask r_PSIS: apply=true weight=10
      IKMarkerTask l_PSIS: apply=true weight=10
      IKMarkerTask r_knee: apply=true weight=10
      IKMarkerTask r_mknee: apply=true weight=10
      IKMarkerTask r_ankle: apply=true weight=10
      IKMarkerTask r_mankle: apply=true weight=10
      IKMarkerTask r_toe: apply=true weight=10
      IKMarkerTask r_5meta: apply=true weight=10
      IKMarkerTask r_calc: apply=true weight=10
      IKMarkerTask l_knee: apply=true weight=10
      IKMarkerTask l_mknee: apply=true weight=10
      IKMarkerTask l_ankle: apply=true weight=10
      IKMarkerTask l_mankle: apply=true weight=10
      IKMarkerTask l_toe: apply=true weight=10
      IKMarkerTask l_calc: apply=true weight=10
      IKMarkerTask l_5meta: apply=true weight=10
      IKMarkerTask r_lelbow: apply=true weight=1
      IKMarkerTask r_mwrist: apply=true weight=5
      IKMarkerTask r_lwrist: apply=true weight=5
      IKMarkerTask l_lelbow: apply=true weight=1
      IKMarkerTask l_mwrist: apply=true weight=5
      IKMarkerTask l_lwrist: apply=true weight=5
      IKCoordinateTask [values shared by the 13 below unless stated]: apply=true weight=0.1 value_type=manual_value
          value=0
      IKCoordinateTask hip_flexion_r
      IKCoordinateTask hip_rotation_r: apply=false
      IKCoordinateTask knee_angle_r
      IKCoordinateTask knee_adduction_r
      IKCoordinateTask ankle_angle_r: value=0.08726646
      IKCoordinateTask hip_flexion_l
      IKCoordinateTask hip_rotation_l: apply=false
      IKCoordinateTask knee_angle_l
      IKCoordinateTask knee_adduction_l
      IKCoordinateTask ankle_angle_l: value=0.08726646
      IKCoordinateTask lumbar_extension
      IKCoordinateTask lumbar_bending
      IKCoordinateTask lumbar_rotation
